<neuroml xmlns="http://www.neuroml.org/schema/neuroml2"  xmlns:xs="http://www.w3.org/2001/XMLSchema" xmlns:xsi="http://www.w3.org/2001/XMLSchema-instance" xsi:schemaLocation="http://www.neuroml.org/schema/neuroml2 https://raw.github.com/NeuroML/NeuroML2/development/Schemas/NeuroML2/NeuroML_v2beta4.xsd" id="HHSmall">
    <notes>NeuroML 2 file exported from NetPyNE v0.4.6</notes>
    <include href="HH.cell.nml"></include>
    <expTwoSynapse id="NMDA" gbase="1uS" erev="0mV" tauDecay="3ms" tauRise="0.2ms"/>
    <spikeGenerator id="NetStim_background_PYR_20_0_NMDA" period="0.05s"/>
    <network id="HHSmall">
        <population id="PYR" component="HH" type="populationList">
            <instance id="0">
                <location x="91.711585874816009" y="62.411324223264955" z="18.616023751669676"/>
            </instance>
            <instance id="1">
                <location x="67.115838414070012" y="36.72056502814722" z="88.648257869986452"/>
            </instance>
            <instance id="2">
                <location x="51.804630571516853" y="33.86307903737071" z="76.246429339951561"/>
            </instance>
        </population>
        <population id="Pop_NetStim_background_PYR_20_0_NMDA" component="NetStim_background_PYR_20_0_NMDA" size="3"/>
        <projection id="NetConn_PYR_PYR_NMDA" presynapticPopulation="PYR" postsynapticPopulation="PYR" synapse="NMDA">
            <connectionWD id="0" preCellId="../PYR/1/HH" postCellId="../PYR/0/HH" weight="0.002" delay="12.5090649282 ms"/>
            <connectionWD id="1" preCellId="../PYR/2/HH" postCellId="../PYR/0/HH" weight="0.002" delay="8.9645226434 ms"/>
            <connectionWD id="2" preCellId="../PYR/0/HH" postCellId="../PYR/1/HH" weight="0.002" delay="12.5090649282 ms"/>
            <connectionWD id="3" preCellId="../PYR/2/HH" postCellId="../PYR/1/HH" weight="0.002" delay="2.54791801334 ms"/>
            <connectionWD id="4" preCellId="../PYR/0/HH" postCellId="../PYR/2/HH" weight="0.002" delay="8.9645226434 ms"/>
            <connectionWD id="5" preCellId="../PYR/1/HH" postCellId="../PYR/2/HH" weight="0.002" delay="2.54791801334 ms"/>
        </projection>
        <projection id="NetConn_NetStim_background_PYR_20_0_NMDA__PYR" presynapticPopulation="Pop_NetStim_background_PYR_20_0_NMDA" postsynapticPopulation="PYR" synapse="NMDA">
            <connectionWD id="0" preCellId="../Pop_NetStim_background_PYR_20_0_NMDA[0]" postCellId="../PYR/0/HH" weight="0.02" delay="0 ms"/>
            <connectionWD id="1" preCellId="../Pop_NetStim_background_PYR_20_0_NMDA[1]" postCellId="../PYR/1/HH" weight="0.02" delay="0 ms"/>
            <connectionWD id="2" preCellId="../Pop_NetStim_background_PYR_20_0_NMDA[2]" postCellId="../PYR/2/HH" weight="0.02" delay="0 ms"/>
        </projection>
    </network>
</neuroml>
