<neuroml xmlns="http://www.neuroml.org/schema/neuroml2"  xmlns:xs="http://www.w3.org/2001/XMLSchema" xmlns:xsi="http://www.w3.org/2001/XMLSchema-instance" xsi:schemaLocation="http://www.neuroml.org/schema/neuroml2 https://raw.github.com/NeuroML/NeuroML2/development/Schemas/NeuroML2/NeuroML_v2beta5.xsd" id="HybridTut">
    <notes>NeuroML 2 file exported from NetPyNE v0.5.4</notes>
    <include href="HH.cell.nml"></include>
    <include href="Izhi2007b.cell.nml"></include>
    <expOneSynapse id="AMPA" gbase="1uS" erev="0mV" tauDecay="0.1ms"/>
    <spikeGeneratorPoisson id="NetStim_background_PYR_Izhi_10_1_AMPA" averageRate="10 Hz"/>
    <spikeGeneratorPoisson id="NetStim_background_PYR_HH_10_1_AMPA" averageRate="10 Hz"/>
    <network id="HybridTut">
        <population id="PYR_HH" component="HH" size="50" type="populationList">
            <instance id="0">
                <location x="37.08105043719663" y="50.724430936622319" z="10.998529106737065"/>
            </instance>
            <instance id="1">
                <location x="46.525981747534793" y="84.629639164793971" z="53.114905274949543"/>
            </instance>
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        </population>
        <population id="PYR_Izhi" component="Izhi2007b" size="50" type="populationList">
            <instance id="0">
                <location x="21.646411005402776" y="22.108919245527758" z="13.464939689444822"/>
            </instance>
            <instance id="1">
                <location x="83.276967270524139" y="97.651165477183682" z="53.593043472467414"/>
            </instance>
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        </population>
        <population id="Pop_NetStim_background_PYR_Izhi_10_1_AMPA" component="NetStim_background_PYR_Izhi_10_1_AMPA" size="50"/>
        <population id="Pop_NetStim_background_PYR_HH_10_1_AMPA" component="NetStim_background_PYR_HH_10_1_AMPA" size="50"/>
        <projection id="NetConn_PYR_HH_PYR_Izhi_AMPA" presynapticPopulation="PYR_HH" postsynapticPopulation="PYR_Izhi" synapse="AMPA">
            <connectionWD id="0" preCellId="../PYR_HH/21/HH" postCellId="../PYR_Izhi/0/Izhi2007b" weight="0.2" delay="13.2982725832 ms"/>
            <connectionWD id="1" preCellId="../PYR_HH/10/HH" postCellId="../PYR_Izhi/1/Izhi2007b" weight="0.2" delay="13.9714469575 ms"/>
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        </projection>
        <projection id="NetConn_PYR_HH_PYR_HH_AMPA" presynapticPopulation="PYR_HH" postsynapticPopulation="PYR_HH" synapse="AMPA">
            <connectionWD id="0" preCellId="../PYR_HH/26/HH" postCellId="../PYR_HH/0/HH" weight="0.2" delay="12.6539406162 ms"/>
            <connectionWD id="1" preCellId="../PYR_HH/5/HH" postCellId="../PYR_HH/1/HH" weight="0.2" delay="12.1064331365 ms"/>
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        </projection>
        <projection id="NetConn_PYR_Izhi_PYR_HH_AMPA" presynapticPopulation="PYR_Izhi" postsynapticPopulation="PYR_HH" synapse="AMPA">
            <connectionWD id="0" preCellId="../PYR_Izhi/17/Izhi2007b" postCellId="../PYR_HH/3/HH" weight="0.2" delay="12.0209139225 ms"/>
            <connectionWD id="1" preCellId="../PYR_Izhi/1/Izhi2007b" postCellId="../PYR_HH/3/HH" weight="0.2" delay="12.9480295385 ms"/>
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        </projection>
        <projection id="NetConn_PYR_Izhi_PYR_Izhi_AMPA" presynapticPopulation="PYR_Izhi" postsynapticPopulation="PYR_Izhi" synapse="AMPA">
            <connectionWD id="0" preCellId="../PYR_Izhi/30/Izhi2007b" postCellId="../PYR_Izhi/0/Izhi2007b" weight="0.2" delay="14.1046383884 ms"/>
            <connectionWD id="1" preCellId="../PYR_Izhi/41/Izhi2007b" postCellId="../PYR_Izhi/1/Izhi2007b" weight="0.2" delay="14.6392785102 ms"/>
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        </projection>
        <projection id="NetConn_NetStim_background_PYR_Izhi_10_1_AMPA__PYR_Izhi" presynapticPopulation="Pop_NetStim_background_PYR_Izhi_10_1_AMPA" postsynapticPopulation="PYR_Izhi" synapse="AMPA">
            <connectionWD id="0" preCellId="../Pop_NetStim_background_PYR_Izhi_10_1_AMPA[0]" postCellId="../PYR_Izhi/0/Izhi2007b" weight="1." delay="2.2452414086 ms"/>
            <connectionWD id="1" preCellId="../Pop_NetStim_background_PYR_Izhi_10_1_AMPA[1]" postCellId="../PYR_Izhi/1/Izhi2007b" weight="1." delay="4.16565791366 ms"/>
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        </projection>
        <projection id="NetConn_NetStim_background_PYR_HH_10_1_AMPA__PYR_HH" presynapticPopulation="Pop_NetStim_background_PYR_HH_10_1_AMPA" postsynapticPopulation="PYR_HH" synapse="AMPA">
            <connectionWD id="0" preCellId="../Pop_NetStim_background_PYR_HH_10_1_AMPA[0]" postCellId="../PYR_HH/0/HH" weight="1." delay="1.92931923978 ms"/>
            <connectionWD id="1" preCellId="../Pop_NetStim_background_PYR_HH_10_1_AMPA[1]" postCellId="../PYR_HH/1/HH" weight="1." delay="2.27050893494 ms"/>
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        </projection>
    </network>
</neuroml>
