<neuroml xmlns="http://www.neuroml.org/schema/neuroml2"  xmlns:xs="http://www.w3.org/2001/XMLSchema" xmlns:xsi="http://www.w3.org/2001/XMLSchema-instance" xsi:schemaLocation="http://www.neuroml.org/schema/neuroml2 https://raw.github.com/NeuroML/NeuroML2/development/Schemas/NeuroML2/NeuroML_v2beta5.xsd" id="M1">
    <notes>NeuroML 2 file exported from NetPyNE v0.7.9</notes>
    <expTwoSynapse id="AMPA" gbase="1uS" erev="0mV" tauDecay="5.3ms" tauRise="0.05ms"/>
    <expTwoSynapse id="NMDA" gbase="1uS" erev="0mV" tauDecay="15ms" tauRise="0.15ms"/>
    <expTwoSynapse id="GABAA" gbase="1uS" erev="-80mV" tauDecay="9.1ms" tauRise="0.07ms"/>
    <expTwoSynapse id="GABAB" gbase="1uS" erev="-80mV" tauDecay="9.1ms" tauRise="0.07ms"/>
    <izhikevich2007Cell id="CELL_IT" C="100 pF" v0="-60 mV" k="0.7 nS_per_mV" vr="-60 mV" vt="-40 mV" vpeak="35 mV" a="0.03 per_ms" b="-2 nS" c="-50 mV" d="100 pA"/>
    <izhikevich2007Cell id="CELL_PT" C="150.0 pF" v0="-75 mV" k="1.2 nS_per_mV" vr="-75 mV" vt="-45 mV" vpeak="50 mV" a="0.01 per_ms" b="5 nS" c="-56 mV" d="130 pA"/>
    <izhikevich2007Cell id="CELL_CT" C="100 pF" v0="-60 mV" k="0.7 nS_per_mV" vr="-60 mV" vt="-40 mV" vpeak="35 mV" a="0.03 per_ms" b="-2 nS" c="-50 mV" d="100 pA"/>
    <izhikevich2007Cell id="CELL_PV" C="20.0 pF" v0="-55 mV" k="1.0 nS_per_mV" vr="-55 mV" vt="-40 mV" vpeak="25 mV" a="0.2 per_ms" b="-2 nS" c="-45 mV" d="-55 pA"/>
    <izhikevich2007Cell id="CELL_SOM" C="100.0 pF" v0="-56 mV" k="1.0 nS_per_mV" vr="-56 mV" vt="-42 mV" vpeak="40 mV" a="0.03 per_ms" b="8 nS" c="-53 mV" d="20 pA"/>
    <spikeGeneratorPoisson id="NetStim_background_E_IT_L6_20_1_NMDA" averageRate="20 Hz"/>
    <spikeGeneratorPoisson id="NetStim_background_E_IT_L5B_20_1_NMDA" averageRate="20 Hz"/>
    <spikeGeneratorPoisson id="NetStim_background_E_PV_L5_20_1_NMDA" averageRate="20 Hz"/>
    <spikeGeneratorPoisson id="NetStim_background_E_SOM_L6_20_1_NMDA" averageRate="20 Hz"/>
    <spikeGeneratorPoisson id="NetStim_background_E_SOM_L5_20_1_NMDA" averageRate="20 Hz"/>
    <spikeGeneratorPoisson id="NetStim_background_E_PT_L5B_20_1_NMDA" averageRate="20 Hz"/>
    <spikeGeneratorPoisson id="NetStim_background_E_IT_L4_20_1_NMDA" averageRate="20 Hz"/>
    <spikeGeneratorPoisson id="NetStim_background_E_PV_L23_20_1_NMDA" averageRate="20 Hz"/>
    <spikeGeneratorPoisson id="NetStim_background_E_CT_L6_20_1_NMDA" averageRate="20 Hz"/>
    <spikeGeneratorPoisson id="NetStim_background_E_IT_L23_20_1_NMDA" averageRate="20 Hz"/>
    <spikeGeneratorPoisson id="NetStim_background_E_PV_L6_20_1_NMDA" averageRate="20 Hz"/>
    <spikeGeneratorPoisson id="NetStim_background_E_IT_L5A_20_1_NMDA" averageRate="20 Hz"/>
    <spikeGeneratorPoisson id="NetStim_background_E_SOM_L23_20_1_NMDA" averageRate="20 Hz"/>
    <network id="M1">
        <population id="IT_L23" component="CELL_IT" size="51" type="populationList">
            <property tag="radius" value="5"/>
            <property tag="region" value="L23"/>
            <instance id="0">
                <location x="33.335887237140938" y="312.742451868312742" z="23.50954373285418"/>
            </instance>
            <instance id="1">
                <location x="39.275630775542083" y="312.31536542640174" z="49.901946599152417"/>
            </instance>
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        </population>
        <population id="IT_L4" component="CELL_IT" size="26" type="populationList">
            <property tag="radius" value="5"/>
            <property tag="region" value="L4"/>
            <instance id="0">
                <location x="17.386634469175096" y="423.815386514338854" z="11.397751767328533"/>
            </instance>
            <instance id="1">
                <location x="36.945173217229268" y="517.315520687770118" z="33.057078397121032"/>
            </instance>
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        </population>
        <population id="IT_L5A" component="CELL_IT" size="29" type="populationList">
            <property tag="radius" value="5"/>
            <property tag="region" value="L5"/>
            <instance id="0">
                <location x="1.919020385965933" y="665.476017034967413" z="40.281073180893188"/>
            </instance>
            <instance id="1">
                <location x="4.403480723406309" y="649.474369906942798" z="14.343996831601485"/>
            </instance>
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        </population>
        <population id="IT_L5B" component="CELL_IT" size="33" type="populationList">
            <property tag="radius" value="5"/>
            <property tag="region" value="L5"/>
            <instance id="0">
                <location x="43.467302947894829" y="738.809525097648248" z="30.268148127880846"/>
            </instance>
            <instance id="1">
                <location x="2.839714334616504" y="856.201992865022817" z="3.771727799025427"/>
            </instance>
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        </population>
        <population id="PT_L5B" component="CELL_PT" size="33" type="populationList">
            <property tag="radius" value="5"/>
            <property tag="region" value="L5"/>
            <instance id="0">
                <location x="0.833534204672665" y="855.456750729596934" z="14.393497965206976"/>
            </instance>
            <instance id="1">
                <location x="35.394865487377423" y="798.814409754747885" z="47.641950077926289"/>
            </instance>
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        </population>
        <population id="IT_L6" component="CELL_IT" size="31" type="populationList">
            <property tag="radius" value="5"/>
            <property tag="region" value="L6"/>
            <instance id="0">
                <location x="34.120741664869534" y="1315.796834661439789" z="45.1711707876131"/>
            </instance>
            <instance id="1">
                <location x="11.632115833546939" y="1043.212762220480499" z="20.736874029800092"/>
            </instance>
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        </population>
        <population id="CT_L6" component="CELL_CT" size="31" type="populationList">
            <property tag="radius" value="5"/>
            <property tag="region" value="L6"/>
            <instance id="0">
                <location x="3.958655089615226" y="1300.23295671825008" z="23.62227405569929"/>
            </instance>
            <instance id="1">
                <location x="49.295873916871876" y="1338.03911326929483" z="0.235635088701817"/>
            </instance>
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        </population>
        <population id="PV_L23" component="CELL_PV" size="7" type="populationList">
            <property tag="radius" value="5"/>
            <property tag="region" value="L23"/>
            <instance id="0">
                <location x="22.363584378649577" y="149.840399972549562" z="24.686610949065859"/>
            </instance>
            <instance id="1">
                <location x="12.565058129242376" y="264.559729987974322" z="32.077768996339813"/>
            </instance>
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        </population>
        <population id="SOM_L23" component="CELL_SOM" size="7" type="populationList">
            <property tag="radius" value="5"/>
            <property tag="region" value="L23"/>
            <instance id="0">
                <location x="39.405205312789136" y="346.899919582088501" z="21.997690125834733"/>
            </instance>
            <instance id="1">
                <location x="24.612879689174498" y="192.099585473979914" z="8.894376314968248"/>
            </instance>
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        </population>
        <population id="PV_L5" component="CELL_PV" size="15" type="populationList">
            <property tag="radius" value="5"/>
            <property tag="region" value="L5"/>
            <instance id="0">
                <location x="0.986292469085592" y="987.523261329619345" z="47.327739711076084"/>
            </instance>
            <instance id="1">
                <location x="36.115480508628423" y="603.351679889519801" z="46.28164550608917"/>
            </instance>
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        </population>
        <population id="SOM_L5" component="CELL_SOM" size="15" type="populationList">
            <property tag="radius" value="5"/>
            <property tag="region" value="L5"/>
            <instance id="0">
                <location x="13.389457246896471" y="1039.021870313789123" z="10.764657901421968"/>
            </instance>
            <instance id="1">
                <location x="36.586980222122051" y="875.112932921477295" z="19.547843369760585"/>
            </instance>
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        </population>
        <population id="PV_L6" component="CELL_PV" size="7" type="populationList">
            <property tag="radius" value="5"/>
            <property tag="region" value="L6"/>
            <instance id="0">
                <location x="32.745942326088915" y="1153.988812076396016" z="39.195109394100704"/>
            </instance>
            <instance id="1">
                <location x="18.532549364368304" y="1088.348198612837905" z="7.634454160548175"/>
            </instance>
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        </population>
        <population id="SOM_L6" component="CELL_SOM" size="7" type="populationList">
            <property tag="radius" value="5"/>
            <property tag="region" value="L6"/>
            <instance id="0">
                <location x="13.896505729319411" y="1247.369303866087193" z="5.872878419264946"/>
            </instance>
            <instance id="1">
                <location x="7.030452506842452" y="1249.166195723538749" z="3.656799869226106"/>
            </instance>
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        </population>
        <population id="Pop_NetStim_background_E_IT_L6_20_1_NMDA" component="NetStim_background_E_IT_L6_20_1_NMDA" size="31"/>
        <population id="Pop_NetStim_background_E_IT_L5B_20_1_NMDA" component="NetStim_background_E_IT_L5B_20_1_NMDA" size="33"/>
        <population id="Pop_NetStim_background_E_PV_L5_20_1_NMDA" component="NetStim_background_E_PV_L5_20_1_NMDA" size="15"/>
        <population id="Pop_NetStim_background_E_SOM_L6_20_1_NMDA" component="NetStim_background_E_SOM_L6_20_1_NMDA" size="7"/>
        <population id="Pop_NetStim_background_E_SOM_L5_20_1_NMDA" component="NetStim_background_E_SOM_L5_20_1_NMDA" size="15"/>
        <population id="Pop_NetStim_background_E_PT_L5B_20_1_NMDA" component="NetStim_background_E_PT_L5B_20_1_NMDA" size="33"/>
        <population id="Pop_NetStim_background_E_IT_L4_20_1_NMDA" component="NetStim_background_E_IT_L4_20_1_NMDA" size="26"/>
        <population id="Pop_NetStim_background_E_PV_L23_20_1_NMDA" component="NetStim_background_E_PV_L23_20_1_NMDA" size="7"/>
        <population id="Pop_NetStim_background_E_CT_L6_20_1_NMDA" component="NetStim_background_E_CT_L6_20_1_NMDA" size="31"/>
        <population id="Pop_NetStim_background_E_IT_L23_20_1_NMDA" component="NetStim_background_E_IT_L23_20_1_NMDA" size="51"/>
        <population id="Pop_NetStim_background_E_PV_L6_20_1_NMDA" component="NetStim_background_E_PV_L6_20_1_NMDA" size="7"/>
        <population id="Pop_NetStim_background_E_IT_L5A_20_1_NMDA" component="NetStim_background_E_IT_L5A_20_1_NMDA" size="29"/>
        <population id="Pop_NetStim_background_E_SOM_L23_20_1_NMDA" component="NetStim_background_E_SOM_L23_20_1_NMDA" size="7"/>
        <projection id="NetConn_IT_L23_PV_L5_AMPA" presynapticPopulation="IT_L23" postsynapticPopulation="PV_L5" synapse="AMPA">
            <connectionWD id="0" preCellId="../IT_L23/0/CELL_IT" postCellId="../PV_L5/1/CELL_PV" weight="0.0055" delay="4.915133241706242 ms"/>
            <connectionWD id="1" preCellId="../IT_L23/1/CELL_IT" postCellId="../PV_L5/1/CELL_PV" weight="0.0055" delay="4.910759857253581 ms"/>
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        </projection>
        <projection id="NetConn_IT_L5B_SOM_L5_AMPA" presynapticPopulation="IT_L5B" postsynapticPopulation="SOM_L5" synapse="AMPA">
            <connectionWD id="0" preCellId="../IT_L5B/21/CELL_IT" postCellId="../SOM_L5/0/CELL_SOM" weight="0.006125" delay="2.3760485432581695 ms"/>
            <connectionWD id="1" preCellId="../IT_L5B/16/CELL_IT" postCellId="../SOM_L5/1/CELL_SOM" weight="0.006125" delay="2.8940631766694214 ms"/>
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        </projection>
        <projection id="NetConn_SOM_L6_SOM_L6_GABAB" presynapticPopulation="SOM_L6" postsynapticPopulation="SOM_L6" synapse="GABAB">
            <connectionWD id="0" preCellId="../SOM_L6/4/CELL_SOM" postCellId="../SOM_L6/0/CELL_SOM" weight="0.025" delay="2.8015713318902082 ms"/>
            <connectionWD id="1" preCellId="../SOM_L6/6/CELL_SOM" postCellId="../SOM_L6/0/CELL_SOM" weight="0.025" delay="2.431447560959409 ms"/>
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        </projection>
        <projection id="NetConn_CT_L6_CT_L6_AMPA" presynapticPopulation="CT_L6" postsynapticPopulation="CT_L6" synapse="AMPA">
            <connectionWD id="0" preCellId="../CT_L6/5/CELL_CT" postCellId="../CT_L6/0/CELL_CT" weight="0.0265" delay="2.39006212409465 ms"/>
            <connectionWD id="1" preCellId="../CT_L6/2/CELL_CT" postCellId="../CT_L6/1/CELL_CT" weight="0.0265" delay="2.851830790637128 ms"/>
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        </projection>
        <projection id="NetConn_SOM_L23_IT_L23_GABAB" presynapticPopulation="SOM_L23" postsynapticPopulation="IT_L23" synapse="GABAB">
            <connectionWD id="0" preCellId="../SOM_L23/0/CELL_SOM" postCellId="../IT_L23/0/CELL_IT" weight="0.025" delay="2.34725421867129 ms"/>
            <connectionWD id="1" preCellId="../SOM_L23/4/CELL_SOM" postCellId="../IT_L23/0/CELL_IT" weight="0.025" delay="2.1702793609191615 ms"/>
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        </projection>
        <projection id="NetConn_IT_L5B_CT_L6_AMPA" presynapticPopulation="IT_L5B" postsynapticPopulation="CT_L6" synapse="AMPA">
            <connectionWD id="0" preCellId="../IT_L5B/28/CELL_IT" postCellId="../CT_L6/2/CELL_CT" weight="0.0245" delay="5.2390438591242345 ms"/>
            <connectionWD id="1" preCellId="../IT_L5B/13/CELL_IT" postCellId="../CT_L6/3/CELL_CT" weight="0.0245" delay="5.839569127330431 ms"/>
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        </projection>
        <projection id="NetConn_IT_L6_SOM_L5_AMPA" presynapticPopulation="IT_L6" postsynapticPopulation="SOM_L5" synapse="AMPA">
            <connectionWD id="0" preCellId="../IT_L6/9/CELL_IT" postCellId="../SOM_L5/0/CELL_SOM" weight="0.012393" delay="4.0881985786575505 ms"/>
            <connectionWD id="1" preCellId="../IT_L6/30/CELL_IT" postCellId="../SOM_L5/0/CELL_SOM" weight="0.012393" delay="2.525052945760074 ms"/>
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        </projection>
        <projection id="NetConn_IT_L4_PT_L5B_AMPA" presynapticPopulation="IT_L4" postsynapticPopulation="PT_L5B" synapse="AMPA">
            <connectionWD id="0" preCellId="../IT_L4/20/CELL_IT" postCellId="../PT_L5B/1/CELL_PT" weight="0.044" delay="5.437255903640158 ms"/>
            <connectionWD id="1" preCellId="../IT_L4/3/CELL_IT" postCellId="../PT_L5B/5/CELL_PT" weight="0.044" delay="5.269055787145382 ms"/>
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        </projection>
        <projection id="NetConn_IT_L5A_IT_L23_AMPA" presynapticPopulation="IT_L5A" postsynapticPopulation="IT_L23" synapse="AMPA">
            <connectionWD id="0" preCellId="../IT_L5A/22/CELL_IT" postCellId="../IT_L23/0/CELL_IT" weight="0.013" delay="5.870376414307078 ms"/>
            <connectionWD id="1" preCellId="../IT_L5A/3/CELL_IT" postCellId="../IT_L23/2/CELL_IT" weight="0.0335" delay="3.9151639572607553 ms"/>
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        </projection>
        <projection id="NetConn_IT_L4_IT_L5B_AMPA" presynapticPopulation="IT_L4" postsynapticPopulation="IT_L5B" synapse="AMPA">
            <connectionWD id="0" preCellId="../IT_L4/20/CELL_IT" postCellId="../IT_L5B/0/CELL_IT" weight="0.044" delay="4.826375626264344 ms"/>
            <connectionWD id="1" preCellId="../IT_L4/21/CELL_IT" postCellId="../IT_L5B/1/CELL_IT" weight="0.044" delay="5.677821012929064 ms"/>
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        </projection>
        <projection id="NetConn_PT_L5B_IT_L5B_AMPA" presynapticPopulation="PT_L5B" postsynapticPopulation="IT_L5B" synapse="AMPA">
            <connectionWD id="0" preCellId="../PT_L5B/31/CELL_PT" postCellId="../IT_L5B/0/CELL_IT" weight="0.0355" delay="4.098067960542677 ms"/>
            <connectionWD id="1" preCellId="../PT_L5B/20/CELL_PT" postCellId="../IT_L5B/1/CELL_IT" weight="0.02525" delay="3.7734023671606516 ms"/>
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        </projection>
        <projection id="NetConn_PV_L5_SOM_L5_GABAA" presynapticPopulation="PV_L5" postsynapticPopulation="SOM_L5" synapse="GABAA">
            <connectionWD id="0" preCellId="../PV_L5/9/CELL_PV" postCellId="../SOM_L5/0/CELL_SOM" weight="0.025" delay="2.8288557330699535 ms"/>
            <connectionWD id="1" preCellId="../PV_L5/11/CELL_PV" postCellId="../SOM_L5/0/CELL_SOM" weight="0.025" delay="4.759572658692957 ms"/>
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        </projection>
        <projection id="NetConn_PV_L5_PT_L5B_GABAA" presynapticPopulation="PV_L5" postsynapticPopulation="PT_L5B" synapse="GABAA">
            <connectionWD id="0" preCellId="../PV_L5/2/CELL_PV" postCellId="../PT_L5B/0/CELL_PT" weight="0.025" delay="2.7779906815011057 ms"/>
            <connectionWD id="1" preCellId="../PV_L5/3/CELL_PV" postCellId="../PT_L5B/0/CELL_PT" weight="0.025" delay="3.711099408738698 ms"/>
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        </projection>
        <projection id="NetConn_IT_L4_SOM_L23_AMPA" presynapticPopulation="IT_L4" postsynapticPopulation="SOM_L23" synapse="AMPA">
            <connectionWD id="0" preCellId="../IT_L4/11/CELL_IT" postCellId="../SOM_L23/0/CELL_SOM" weight="0.018125" delay="3.4413892988628887 ms"/>
            <connectionWD id="1" preCellId="../IT_L4/21/CELL_IT" postCellId="../SOM_L23/0/CELL_SOM" weight="0.018125" delay="3.460782326229279 ms"/>
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        </projection>
        <projection id="NetConn_IT_L6_IT_L4_AMPA" presynapticPopulation="IT_L6" postsynapticPopulation="IT_L4" synapse="AMPA">
            <connectionWD id="0" preCellId="../IT_L6/29/CELL_IT" postCellId="../IT_L4/1/CELL_IT" weight="0.002" delay="7.866588733046717 ms"/>
            <connectionWD id="1" preCellId="../IT_L6/19/CELL_IT" postCellId="../IT_L4/2/CELL_IT" weight="0.002" delay="9.876074409546256 ms"/>
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        </projection>
        <projection id="NetConn_PT_L5B_SOM_L23_AMPA" presynapticPopulation="PT_L5B" postsynapticPopulation="SOM_L23" synapse="AMPA">
            <connectionWD id="0" preCellId="../PT_L5B/18/CELL_PT" postCellId="../SOM_L23/2/CELL_SOM" weight="0.018125" delay="9.186956463184359 ms"/>
        </projection>
        <projection id="NetConn_PT_L5B_IT_L4_AMPA" presynapticPopulation="PT_L5B" postsynapticPopulation="IT_L4" synapse="AMPA">
            <connectionWD id="0" preCellId="../PT_L5B/21/CELL_PT" postCellId="../IT_L4/1/CELL_IT" weight="0.01025" delay="4.628803112749578 ms"/>
            <connectionWD id="1" preCellId="../PT_L5B/27/CELL_PT" postCellId="../IT_L4/2/CELL_IT" weight="0.01025" delay="3.970081004573216 ms"/>
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        </projection>
        <projection id="NetConn_IT_L5A_IT_L6_AMPA" presynapticPopulation="IT_L5A" postsynapticPopulation="IT_L6" synapse="AMPA">
            <connectionWD id="0" preCellId="../IT_L5A/10/CELL_IT" postCellId="../IT_L6/2/CELL_IT" weight="0.014" delay="8.303748307089359 ms"/>
            <connectionWD id="1" preCellId="../IT_L5A/16/CELL_IT" postCellId="../IT_L6/7/CELL_IT" weight="0.014" delay="8.531093735060349 ms"/>
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        </projection>
        <projection id="NetConn_IT_L5A_PT_L5B_AMPA" presynapticPopulation="IT_L5A" postsynapticPopulation="PT_L5B" synapse="AMPA">
            <connectionWD id="0" preCellId="../IT_L5A/5/CELL_IT" postCellId="../PT_L5B/0/CELL_PT" weight="0.0355" delay="3.7658517121523998 ms"/>
            <connectionWD id="1" preCellId="../IT_L5A/9/CELL_IT" postCellId="../PT_L5B/0/CELL_PT" weight="0.0355" delay="3.5764546024308848 ms"/>
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        </projection>
        <projection id="NetConn_SOM_L6_PV_L6_GABAB" presynapticPopulation="SOM_L6" postsynapticPopulation="PV_L6" synapse="GABAB">
            <connectionWD id="0" preCellId="../SOM_L6/3/CELL_SOM" postCellId="../PV_L6/0/CELL_PV" weight="0.025" delay="2.7303140714856644 ms"/>
            <connectionWD id="1" preCellId="../SOM_L6/6/CELL_SOM" postCellId="../PV_L6/0/CELL_PV" weight="0.025" delay="2.6684625879989654 ms"/>
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        </projection>
        <projection id="NetConn_PV_L6_IT_L6_GABAA" presynapticPopulation="PV_L6" postsynapticPopulation="IT_L6" synapse="GABAA">
            <connectionWD id="0" preCellId="../PV_L6/3/CELL_PV" postCellId="../IT_L6/0/CELL_IT" weight="0.025" delay="2.043076466388705 ms"/>
            <connectionWD id="1" preCellId="../PV_L6/5/CELL_PV" postCellId="../IT_L6/0/CELL_IT" weight="0.025" delay="2.2764130700453418 ms"/>
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        </projection>
        <projection id="NetConn_PV_L6_SOM_L6_GABAA" presynapticPopulation="PV_L6" postsynapticPopulation="SOM_L6" synapse="GABAA">
            <connectionWD id="0" preCellId="../PV_L6/0/CELL_PV" postCellId="../SOM_L6/0/CELL_SOM" weight="0.025" delay="3.009236770239794 ms"/>
            <connectionWD id="1" preCellId="../PV_L6/3/CELL_PV" postCellId="../SOM_L6/0/CELL_SOM" weight="0.025" delay="2.841866307410046 ms"/>
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        </projection>
        <projection id="NetConn_PV_L5_IT_L5A_GABAA" presynapticPopulation="PV_L5" postsynapticPopulation="IT_L5A" synapse="GABAA">
            <connectionWD id="0" preCellId="../PV_L5/11/CELL_PV" postCellId="../IT_L5A/0/CELL_IT" weight="0.025" delay="2.9953630898983947 ms"/>
            <connectionWD id="1" preCellId="../PV_L5/13/CELL_PV" postCellId="../IT_L5A/0/CELL_IT" weight="0.025" delay="3.171809629826386 ms"/>
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        </projection>
        <projection id="NetConn_PV_L6_PV_L6_GABAA" presynapticPopulation="PV_L6" postsynapticPopulation="PV_L6" synapse="GABAA">
            <connectionWD id="0" preCellId="../PV_L6/1/CELL_PV" postCellId="../PV_L6/0/CELL_PV" weight="0.025" delay="2.742077195049659 ms"/>
            <connectionWD id="1" preCellId="../PV_L6/4/CELL_PV" postCellId="../PV_L6/0/CELL_PV" weight="0.025" delay="2.7884210032822425 ms"/>
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        </projection>
        <projection id="NetConn_CT_L6_IT_L23_AMPA" presynapticPopulation="CT_L6" postsynapticPopulation="IT_L23" synapse="AMPA">
            <connectionWD id="0" preCellId="../CT_L6/12/CELL_CT" postCellId="../IT_L23/34/CELL_IT" weight="0.0085" delay="8.254066368814634 ms"/>
        </projection>
        <projection id="NetConn_IT_L23_IT_L5B_AMPA" presynapticPopulation="IT_L23" postsynapticPopulation="IT_L5B" synapse="AMPA">
            <connectionWD id="0" preCellId="../IT_L23/25/CELL_IT" postCellId="../IT_L5B/2/CELL_IT" weight="0.011" delay="7.725281046397615 ms"/>
            <connectionWD id="1" preCellId="../IT_L23/14/CELL_IT" postCellId="../IT_L5B/5/CELL_IT" weight="0.011" delay="8.320353370015823 ms"/>
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        </projection>
        <projection id="NetConn_IT_L23_PV_L23_AMPA" presynapticPopulation="IT_L23" postsynapticPopulation="PV_L23" synapse="AMPA">
            <connectionWD id="0" preCellId="../IT_L23/6/CELL_IT" postCellId="../PV_L23/0/CELL_PV" weight="0.039" delay="2.588734777453198 ms"/>
            <connectionWD id="1" preCellId="../IT_L23/10/CELL_IT" postCellId="../PV_L23/0/CELL_PV" weight="0.039" delay="4.150789034807396 ms"/>
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        </projection>
        <projection id="NetConn_IT_L6_IT_L5B_AMPA" presynapticPopulation="IT_L6" postsynapticPopulation="IT_L5B" synapse="AMPA">
            <connectionWD id="0" preCellId="../IT_L6/28/CELL_IT" postCellId="../IT_L5B/1/CELL_IT" weight="0.015" delay="5.424657772352107 ms"/>
            <connectionWD id="1" preCellId="../IT_L6/12/CELL_IT" postCellId="../IT_L5B/1/CELL_IT" weight="0.015" delay="6.704511081779051 ms"/>
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        </projection>
        <projection id="NetConn_SOM_L5_IT_L5B_GABAB" presynapticPopulation="SOM_L5" postsynapticPopulation="IT_L5B" synapse="GABAB">
            <connectionWD id="0" preCellId="../SOM_L5/4/CELL_SOM" postCellId="../IT_L5B/0/CELL_IT" weight="0.025" delay="2.6057295189469905 ms"/>
            <connectionWD id="1" preCellId="../SOM_L5/7/CELL_SOM" postCellId="../IT_L5B/0/CELL_IT" weight="0.025" delay="2.150344386691381 ms"/>
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        </projection>
        <projection id="NetConn_IT_L6_IT_L23_AMPA" presynapticPopulation="IT_L6" postsynapticPopulation="IT_L23" synapse="AMPA">
            <connectionWD id="0" preCellId="../IT_L6/4/CELL_IT" postCellId="../IT_L23/31/CELL_IT" weight="0.0085" delay="8.576483046901696 ms"/>
        </projection>
        <projection id="NetConn_IT_L4_IT_L4_AMPA" presynapticPopulation="IT_L4" postsynapticPopulation="IT_L4" synapse="AMPA">
            <connectionWD id="0" preCellId="../IT_L4/21/CELL_IT" postCellId="../IT_L4/0/CELL_IT" weight="0.0475" delay="2.657945044452038 ms"/>
            <connectionWD id="1" preCellId="../IT_L4/20/CELL_IT" postCellId="../IT_L4/0/CELL_IT" weight="0.0475" delay="2.3877634906714897 ms"/>
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        </projection>
        <projection id="NetConn_IT_L5B_IT_L5B_AMPA" presynapticPopulation="IT_L5B" postsynapticPopulation="IT_L5B" synapse="AMPA">
            <connectionWD id="0" preCellId="../IT_L5B/27/CELL_IT" postCellId="../IT_L5B/0/CELL_IT" weight="0.0355" delay="3.7341646552715226 ms"/>
            <connectionWD id="1" preCellId="../IT_L5B/10/CELL_IT" postCellId="../IT_L5B/0/CELL_IT" weight="0.0355" delay="3.413792354450533 ms"/>
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        </projection>
        <projection id="NetConn_IT_L5A_PV_L5_AMPA" presynapticPopulation="IT_L5A" postsynapticPopulation="PV_L5" synapse="AMPA">
            <connectionWD id="0" preCellId="../IT_L5A/0/CELL_IT" postCellId="../PV_L5/0/CELL_PV" weight="0.053875" delay="5.221256789644901 ms"/>
            <connectionWD id="1" preCellId="../IT_L5A/4/CELL_IT" postCellId="../PV_L5/0/CELL_PV" weight="0.053875" delay="5.1996405417477485 ms"/>
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        </projection>
        <projection id="NetConn_CT_L6_IT_L5A_AMPA" presynapticPopulation="CT_L6" postsynapticPopulation="IT_L5A" synapse="AMPA">
            <connectionWD id="0" preCellId="../CT_L6/4/CELL_CT" postCellId="../IT_L5A/0/CELL_IT" weight="0.004" delay="7.509022560624401 ms"/>
            <connectionWD id="1" preCellId="../CT_L6/12/CELL_CT" postCellId="../IT_L5A/1/CELL_IT" weight="0.008" delay="5.931723461543399 ms"/>
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        </projection>
        <projection id="NetConn_PT_L5B_PV_L6_AMPA" presynapticPopulation="PT_L5B" postsynapticPopulation="PV_L6" synapse="AMPA">
            <connectionWD id="0" preCellId="../PT_L5B/7/CELL_PT" postCellId="../PV_L6/2/CELL_PV" weight="0.021875" delay="7.285702534426624 ms"/>
            <connectionWD id="1" preCellId="../PT_L5B/0/CELL_PT" postCellId="../PV_L6/4/CELL_PV" weight="0.021875" delay="5.707854672727327 ms"/>
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        </projection>
        <projection id="NetConn_SOM_L5_PT_L5B_GABAB" presynapticPopulation="SOM_L5" postsynapticPopulation="PT_L5B" synapse="GABAB">
            <connectionWD id="0" preCellId="../SOM_L5/6/CELL_SOM" postCellId="../PT_L5B/0/CELL_PT" weight="0.025" delay="3.074488832167675 ms"/>
            <connectionWD id="1" preCellId="../SOM_L5/7/CELL_SOM" postCellId="../PT_L5B/0/CELL_PT" weight="0.025" delay="3.162740196058386 ms"/>
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        </projection>
        <projection id="NetConn_SOM_L23_SOM_L23_GABAB" presynapticPopulation="SOM_L23" postsynapticPopulation="SOM_L23" synapse="GABAB">
            <connectionWD id="0" preCellId="../SOM_L23/1/CELL_SOM" postCellId="../SOM_L23/0/CELL_SOM" weight="0.025" delay="3.5605657041651 ms"/>
            <connectionWD id="1" preCellId="../SOM_L23/4/CELL_SOM" postCellId="../SOM_L23/0/CELL_SOM" weight="0.025" delay="2.3725202422013276 ms"/>
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        </projection>
        <projection id="NetConn_IT_L4_IT_L23_AMPA" presynapticPopulation="IT_L4" postsynapticPopulation="IT_L23" synapse="AMPA">
            <connectionWD id="0" preCellId="../IT_L4/4/CELL_IT" postCellId="../IT_L23/0/CELL_IT" weight="0.029" delay="3.5240126353999526 ms"/>
            <connectionWD id="1" preCellId="../IT_L4/6/CELL_IT" postCellId="../IT_L23/0/CELL_IT" weight="0.029" delay="3.1250593132317688 ms"/>
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        </projection>
        <projection id="NetConn_IT_L6_SOM_L6_AMPA" presynapticPopulation="IT_L6" postsynapticPopulation="SOM_L6" synapse="AMPA">
            <connectionWD id="0" preCellId="../IT_L6/15/CELL_IT" postCellId="../SOM_L6/1/CELL_SOM" weight="0.0265" delay="3.435978212437229 ms"/>
            <connectionWD id="1" preCellId="../IT_L6/11/CELL_IT" postCellId="../SOM_L6/4/CELL_SOM" weight="0.0265" delay="2.574386971079087 ms"/>
            <connectionWD id="2" preCellId="../IT_L6/25/CELL_IT" postCellId="../SOM_L6/4/CELL_SOM" weight="0.0265" delay="3.6414325099601115 ms"/>
        </projection>
        <projection id="NetConn_IT_L5A_PV_L6_AMPA" presynapticPopulation="IT_L5A" postsynapticPopulation="PV_L6" synapse="AMPA">
            <connectionWD id="0" preCellId="../IT_L5A/7/CELL_IT" postCellId="../PV_L6/1/CELL_PV" weight="0.021875" delay="6.5740928098463085 ms"/>
            <connectionWD id="1" preCellId="../IT_L5A/25/CELL_IT" postCellId="../PV_L6/2/CELL_PV" weight="0.021875" delay="9.232177730782118 ms"/>
            <connectionWD id="2" preCellId="../IT_L5A/5/CELL_IT" postCellId="../PV_L6/5/CELL_PV" weight="0.021875" delay="8.580581375471429 ms"/>
            <connectionWD id="3" preCellId="../IT_L5A/21/CELL_IT" postCellId="../PV_L6/5/CELL_PV" weight="0.021875" delay="8.409670667419679 ms"/>
        </projection>
        <projection id="NetConn_IT_L23_IT_L4_AMPA" presynapticPopulation="IT_L23" postsynapticPopulation="IT_L4" synapse="AMPA">
            <connectionWD id="0" preCellId="../IT_L23/33/CELL_IT" postCellId="../IT_L4/0/CELL_IT" weight="0.0155" delay="4.5809079448237195 ms"/>
            <connectionWD id="1" preCellId="../IT_L23/17/CELL_IT" postCellId="../IT_L4/0/CELL_IT" weight="0.0155" delay="4.537136104866894 ms"/>
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        </projection>
        <projection id="NetConn_IT_L5A_IT_L5A_AMPA" presynapticPopulation="IT_L5A" postsynapticPopulation="IT_L5A" synapse="AMPA">
            <connectionWD id="0" preCellId="../IT_L5A/4/CELL_IT" postCellId="../IT_L5A/0/CELL_IT" weight="0.033" delay="2.2959230916639557 ms"/>
            <connectionWD id="1" preCellId="../IT_L5A/7/CELL_IT" postCellId="../IT_L5A/0/CELL_IT" weight="0.033" delay="2.4324487135233586 ms"/>
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        </projection>
        <projection id="NetConn_CT_L6_SOM_L6_AMPA" presynapticPopulation="CT_L6" postsynapticPopulation="SOM_L6" synapse="AMPA">
            <connectionWD id="0" preCellId="../CT_L6/29/CELL_CT" postCellId="../SOM_L6/0/CELL_SOM" weight="0.0265" delay="2.9109517490567134 ms"/>
            <connectionWD id="1" preCellId="../CT_L6/25/CELL_CT" postCellId="../SOM_L6/1/CELL_SOM" weight="0.0265" delay="3.0173341559510245 ms"/>
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        </projection>
        <projection id="NetConn_IT_L5B_IT_L23_AMPA" presynapticPopulation="IT_L5B" postsynapticPopulation="IT_L23" synapse="AMPA">
            <connectionWD id="0" preCellId="../IT_L5B/5/CELL_IT" postCellId="../IT_L23/0/CELL_IT" weight="0.013" delay="7.11285163037438 ms"/>
            <connectionWD id="1" preCellId="../IT_L5B/2/CELL_IT" postCellId="../IT_L23/6/CELL_IT" weight="0.0105" delay="7.623706643876732 ms"/>
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        </projection>
        <projection id="NetConn_IT_L5B_IT_L4_AMPA" presynapticPopulation="IT_L5B" postsynapticPopulation="IT_L4" synapse="AMPA">
            <connectionWD id="0" preCellId="../IT_L5B/18/CELL_IT" postCellId="../IT_L4/0/CELL_IT" weight="0.0085" delay="6.537830199718463 ms"/>
            <connectionWD id="1" preCellId="../IT_L5B/21/CELL_IT" postCellId="../IT_L4/1/CELL_IT" weight="0.0085" delay="7.129108972479323 ms"/>
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        </projection>
        <projection id="NetConn_CT_L6_PV_L5_AMPA" presynapticPopulation="CT_L6" postsynapticPopulation="PV_L5" synapse="AMPA">
            <connectionWD id="0" preCellId="../CT_L6/14/CELL_CT" postCellId="../PV_L5/0/CELL_PV" weight="0.012393" delay="5.479329606605903 ms"/>
            <connectionWD id="1" preCellId="../CT_L6/18/CELL_CT" postCellId="../PV_L5/0/CELL_PV" weight="0.012393" delay="4.772256594606098 ms"/>
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        </projection>
        <projection id="NetConn_PT_L5B_PV_L5_AMPA" presynapticPopulation="PT_L5B" postsynapticPopulation="PV_L5" synapse="AMPA">
            <connectionWD id="0" preCellId="../PT_L5B/3/CELL_PT" postCellId="../PV_L5/0/CELL_PV" weight="0.053875" delay="4.278224136776174 ms"/>
            <connectionWD id="1" preCellId="../PT_L5B/8/CELL_PT" postCellId="../PV_L5/0/CELL_PV" weight="0.053875" delay="3.335513496553529 ms"/>
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        </projection>
        <projection id="NetConn_IT_L5A_SOM_L23_AMPA" presynapticPopulation="IT_L5A" postsynapticPopulation="SOM_L23" synapse="AMPA">
            <connectionWD id="0" preCellId="../IT_L5A/10/CELL_IT" postCellId="../SOM_L23/0/CELL_SOM" weight="0.018125" delay="4.18377571717368 ms"/>
            <connectionWD id="1" preCellId="../IT_L5A/21/CELL_IT" postCellId="../SOM_L23/1/CELL_SOM" weight="0.018125" delay="7.047677573957176 ms"/>
            <connectionWD id="2" preCellId="../IT_L5A/27/CELL_IT" postCellId="../SOM_L23/3/CELL_SOM" weight="0.018125" delay="6.743938643478868 ms"/>
        </projection>
        <projection id="NetConn_IT_L6_PV_L5_AMPA" presynapticPopulation="IT_L6" postsynapticPopulation="PV_L5" synapse="AMPA">
            <connectionWD id="0" preCellId="../IT_L6/7/CELL_IT" postCellId="../PV_L5/1/CELL_PV" weight="0.012393" delay="8.45396483759157 ms"/>
            <connectionWD id="1" preCellId="../IT_L6/17/CELL_IT" postCellId="../PV_L5/1/CELL_PV" weight="0.012393" delay="8.860461932310667 ms"/>
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        </projection>
        <projection id="NetConn_CT_L6_SOM_L5_AMPA" presynapticPopulation="CT_L6" postsynapticPopulation="SOM_L5" synapse="AMPA">
            <connectionWD id="0" preCellId="../CT_L6/13/CELL_CT" postCellId="../SOM_L5/0/CELL_SOM" weight="0.012393" delay="3.855561216406744 ms"/>
            <connectionWD id="1" preCellId="../CT_L6/8/CELL_CT" postCellId="../SOM_L5/3/CELL_SOM" weight="0.012393" delay="8.030899873928519 ms"/>
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        </projection>
        <projection id="NetConn_IT_L6_CT_L6_AMPA" presynapticPopulation="IT_L6" postsynapticPopulation="CT_L6" synapse="AMPA">
            <connectionWD id="0" preCellId="../IT_L6/9/CELL_IT" postCellId="../CT_L6/0/CELL_CT" weight="0.0265" delay="2.5778316986811083 ms"/>
            <connectionWD id="1" preCellId="../IT_L6/3/CELL_IT" postCellId="../CT_L6/2/CELL_CT" weight="0.0265" delay="2.2921731759110435 ms"/>
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        </projection>
        <projection id="NetConn_SOM_L5_PV_L5_GABAB" presynapticPopulation="SOM_L5" postsynapticPopulation="PV_L5" synapse="GABAB">
            <connectionWD id="0" preCellId="../SOM_L5/1/CELL_SOM" postCellId="../PV_L5/0/CELL_PV" weight="0.025" delay="3.211412957750155 ms"/>
            <connectionWD id="1" preCellId="../SOM_L5/2/CELL_SOM" postCellId="../PV_L5/0/CELL_PV" weight="0.025" delay="2.426919677297675 ms"/>
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        </projection>
        <projection id="NetConn_SOM_L5_IT_L4_GABAB" presynapticPopulation="SOM_L5" postsynapticPopulation="IT_L4" synapse="GABAB">
            <connectionWD id="0" preCellId="../SOM_L5/5/CELL_SOM" postCellId="../IT_L4/0/CELL_IT" weight="0.025" delay="2.6589543164391776 ms"/>
            <connectionWD id="1" preCellId="../SOM_L5/5/CELL_SOM" postCellId="../IT_L4/1/CELL_IT" weight="0.025" delay="2.437843864299151 ms"/>
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        </projection>
        <projection id="NetConn_IT_L5A_IT_L5B_AMPA" presynapticPopulation="IT_L5A" postsynapticPopulation="IT_L5B" synapse="AMPA">
            <connectionWD id="0" preCellId="../IT_L5A/0/CELL_IT" postCellId="../IT_L5B/11/CELL_IT" weight="0.044" delay="3.2170050250942497 ms"/>
            <connectionWD id="1" preCellId="../IT_L5A/10/CELL_IT" postCellId="../IT_L5B/14/CELL_IT" weight="0.044" delay="5.324757736211433 ms"/>
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        </projection>
        <projection id="NetConn_PV_L23_PV_L23_GABAA" presynapticPopulation="PV_L23" postsynapticPopulation="PV_L23" synapse="GABAA">
            <connectionWD id="0" preCellId="../PV_L23/2/CELL_PV" postCellId="../PV_L23/1/CELL_PV" weight="0.025" delay="3.092310059064998 ms"/>
            <connectionWD id="1" preCellId="../PV_L23/4/CELL_PV" postCellId="../PV_L23/1/CELL_PV" weight="0.025" delay="2.2679734487274565 ms"/>
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        </projection>
        <projection id="NetConn_IT_L4_IT_L5A_AMPA" presynapticPopulation="IT_L4" postsynapticPopulation="IT_L5A" synapse="AMPA">
            <connectionWD id="0" preCellId="../IT_L4/24/CELL_IT" postCellId="../IT_L5A/1/CELL_IT" weight="0.03" delay="3.195132353254064 ms"/>
            <connectionWD id="1" preCellId="../IT_L4/25/CELL_IT" postCellId="../IT_L5A/3/CELL_IT" weight="0.032875" delay="2.609361687279191 ms"/>
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        </projection>
        <projection id="NetConn_IT_L23_IT_L5A_AMPA" presynapticPopulation="IT_L23" postsynapticPopulation="IT_L5A" synapse="AMPA">
            <connectionWD id="0" preCellId="../IT_L23/6/CELL_IT" postCellId="../IT_L5A/0/CELL_IT" weight="0.0275" delay="6.596358593004927 ms"/>
            <connectionWD id="1" preCellId="../IT_L23/40/CELL_IT" postCellId="../IT_L5A/0/CELL_IT" weight="0.0275" delay="6.603833852732781 ms"/>
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        </projection>
        <projection id="NetConn_SOM_L5_IT_L5A_GABAB" presynapticPopulation="SOM_L5" postsynapticPopulation="IT_L5A" synapse="GABAB">
            <connectionWD id="0" preCellId="../SOM_L5/0/CELL_SOM" postCellId="../IT_L5A/0/CELL_IT" weight="0.025" delay="5.748857081758836 ms"/>
            <connectionWD id="1" preCellId="../SOM_L5/7/CELL_SOM" postCellId="../IT_L5A/0/CELL_IT" weight="0.025" delay="2.847171146440555 ms"/>
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        </projection>
        <projection id="NetConn_IT_L6_IT_L5A_AMPA" presynapticPopulation="IT_L6" postsynapticPopulation="IT_L5A" synapse="AMPA">
            <connectionWD id="0" preCellId="../IT_L6/27/CELL_IT" postCellId="../IT_L5A/0/CELL_IT" weight="0.004" delay="7.951021023424899 ms"/>
            <connectionWD id="1" preCellId="../IT_L6/7/CELL_IT" postCellId="../IT_L5A/0/CELL_IT" weight="0.004" delay="7.8304178927832 ms"/>
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        </projection>
        <projection id="NetConn_IT_L5B_PV_L23_AMPA" presynapticPopulation="IT_L5B" postsynapticPopulation="PV_L23" synapse="AMPA">
            <connectionWD id="0" preCellId="../IT_L5B/6/CELL_IT" postCellId="../PV_L23/2/CELL_PV" weight="0.018125" delay="10.538281288635922 ms"/>
            <connectionWD id="1" preCellId="../IT_L5B/1/CELL_IT" postCellId="../PV_L23/4/CELL_PV" weight="0.018125" delay="7.902775595179342 ms"/>
            <connectionWD id="2" preCellId="../IT_L5B/16/CELL_IT" postCellId="../PV_L23/5/CELL_PV" weight="0.018125" delay="8.05943647550475 ms"/>
        </projection>
        <projection id="NetConn_CT_L6_PV_L6_AMPA" presynapticPopulation="CT_L6" postsynapticPopulation="PV_L6" synapse="AMPA">
            <connectionWD id="0" preCellId="../CT_L6/22/CELL_CT" postCellId="../PV_L6/0/CELL_PV" weight="0.0265" delay="3.729920710503893 ms"/>
            <connectionWD id="1" preCellId="../CT_L6/28/CELL_CT" postCellId="../PV_L6/1/CELL_PV" weight="0.0265" delay="3.4133793908714005 ms"/>
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        </projection>
        <projection id="NetConn_SOM_L23_PV_L23_GABAB" presynapticPopulation="SOM_L23" postsynapticPopulation="PV_L23" synapse="GABAB">
            <connectionWD id="0" preCellId="../SOM_L23/1/CELL_SOM" postCellId="../PV_L23/1/CELL_PV" weight="0.025" delay="2.770265684264046 ms"/>
            <connectionWD id="1" preCellId="../SOM_L23/6/CELL_SOM" postCellId="../PV_L23/1/CELL_PV" weight="0.025" delay="3.225083564801833 ms"/>
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        </projection>
        <projection id="NetConn_IT_L5B_IT_L5A_AMPA" presynapticPopulation="IT_L5B" postsynapticPopulation="IT_L5A" synapse="AMPA">
            <connectionWD id="0" preCellId="../IT_L5B/22/CELL_IT" postCellId="../IT_L5A/0/CELL_IT" weight="0.012" delay="2.6622348034995142 ms"/>
            <connectionWD id="1" preCellId="../IT_L5B/6/CELL_IT" postCellId="../IT_L5A/0/CELL_IT" weight="0.012" delay="5.4785898184913275 ms"/>
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        </projection>
        <projection id="NetConn_IT_L4_PV_L23_AMPA" presynapticPopulation="IT_L4" postsynapticPopulation="PV_L23" synapse="AMPA">
            <connectionWD id="0" preCellId="../IT_L4/1/CELL_IT" postCellId="../PV_L23/0/CELL_PV" weight="0.018125" delay="5.6785955445390055 ms"/>
            <connectionWD id="1" preCellId="../IT_L4/8/CELL_IT" postCellId="../PV_L23/0/CELL_PV" weight="0.018125" delay="5.952975894696739 ms"/>
            <connectionWD id="2" preCellId="../IT_L4/18/CELL_IT" postCellId="../PV_L23/4/CELL_PV" weight="0.018125" delay="4.0320711839192835 ms"/>
            <connectionWD id="3" preCellId="../IT_L4/15/CELL_IT" postCellId="../PV_L23/5/CELL_PV" weight="0.018125" delay="3.291523271367017 ms"/>
        </projection>
        <projection id="NetConn_IT_L4_SOM_L6_AMPA" presynapticPopulation="IT_L4" postsynapticPopulation="SOM_L6" synapse="AMPA">
            <connectionWD id="0" preCellId="../IT_L4/3/CELL_IT" postCellId="../SOM_L6/6/CELL_SOM" weight="0.021875" delay="9.164183228012742 ms"/>
            <connectionWD id="1" preCellId="../IT_L4/6/CELL_IT" postCellId="../SOM_L6/6/CELL_SOM" weight="0.021875" delay="9.952087402272376 ms"/>
        </projection>
        <projection id="NetConn_IT_L5B_PV_L5_AMPA" presynapticPopulation="IT_L5B" postsynapticPopulation="PV_L5" synapse="AMPA">
            <connectionWD id="0" preCellId="../IT_L5B/10/CELL_IT" postCellId="../PV_L5/0/CELL_PV" weight="0.053875" delay="3.1955546420943666 ms"/>
            <connectionWD id="1" preCellId="../IT_L5B/25/CELL_IT" postCellId="../PV_L5/0/CELL_PV" weight="0.053875" delay="2.747801575994208 ms"/>
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        </projection>
        <projection id="NetConn_IT_L4_PV_L5_AMPA" presynapticPopulation="IT_L4" postsynapticPopulation="PV_L5" synapse="AMPA">
            <connectionWD id="0" preCellId="../IT_L4/2/CELL_IT" postCellId="../PV_L5/0/CELL_PV" weight="0.053875" delay="6.447061980686288 ms"/>
            <connectionWD id="1" preCellId="../IT_L4/5/CELL_IT" postCellId="../PV_L5/0/CELL_PV" weight="0.053875" delay="6.522059937675805 ms"/>
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        </projection>
        <projection id="NetConn_IT_L5B_IT_L6_AMPA" presynapticPopulation="IT_L5B" postsynapticPopulation="IT_L6" synapse="AMPA">
            <connectionWD id="0" preCellId="../IT_L5B/22/CELL_IT" postCellId="../IT_L6/2/CELL_IT" weight="0.0245" delay="6.723483702674584 ms"/>
            <connectionWD id="1" preCellId="../IT_L5B/8/CELL_IT" postCellId="../IT_L6/4/CELL_IT" weight="0.025375" delay="2.6011927554437975 ms"/>
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        </projection>
        <projection id="NetConn_IT_L23_IT_L23_AMPA" presynapticPopulation="IT_L23" postsynapticPopulation="IT_L23" synapse="AMPA">
            <connectionWD id="0" preCellId="../IT_L23/2/CELL_IT" postCellId="../IT_L23/0/CELL_IT" weight="0.039" delay="2.691164850505442 ms"/>
            <connectionWD id="1" preCellId="../IT_L23/4/CELL_IT" postCellId="../IT_L23/0/CELL_IT" weight="0.039" delay="2.8268983321985406 ms"/>
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        </projection>
        <projection id="NetConn_PV_L23_SOM_L23_GABAA" presynapticPopulation="PV_L23" postsynapticPopulation="SOM_L23" synapse="GABAA">
            <connectionWD id="0" preCellId="../PV_L23/3/CELL_PV" postCellId="../SOM_L23/0/CELL_SOM" weight="0.025" delay="2.2487879509896502 ms"/>
            <connectionWD id="1" preCellId="../PV_L23/5/CELL_PV" postCellId="../SOM_L23/0/CELL_SOM" weight="0.025" delay="2.455176327170494 ms"/>
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        </projection>
        <projection id="NetConn_CT_L6_IT_L6_AMPA" presynapticPopulation="CT_L6" postsynapticPopulation="IT_L6" synapse="AMPA">
            <connectionWD id="0" preCellId="../CT_L6/16/CELL_CT" postCellId="../IT_L6/2/CELL_IT" weight="0.0265" delay="3.16216288720116 ms"/>
            <connectionWD id="1" preCellId="../CT_L6/11/CELL_CT" postCellId="../IT_L6/3/CELL_IT" weight="0.0265" delay="2.7681148997084013 ms"/>
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        </projection>
        <projection id="NetConn_SOM_L6_IT_L6_GABAB" presynapticPopulation="SOM_L6" postsynapticPopulation="IT_L6" synapse="GABAB">
            <connectionWD id="0" preCellId="../SOM_L6/2/CELL_SOM" postCellId="../IT_L6/0/CELL_IT" weight="0.025" delay="2.3801932307644855 ms"/>
            <connectionWD id="1" preCellId="../SOM_L6/3/CELL_SOM" postCellId="../IT_L6/1/CELL_IT" weight="0.025" delay="2.4430404129417655 ms"/>
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        </projection>
        <projection id="NetConn_IT_L4_SOM_L5_AMPA" presynapticPopulation="IT_L4" postsynapticPopulation="SOM_L5" synapse="AMPA">
            <connectionWD id="0" preCellId="../IT_L4/4/CELL_IT" postCellId="../SOM_L5/0/CELL_SOM" weight="0.006125" delay="7.793585507590421 ms"/>
            <connectionWD id="1" preCellId="../IT_L4/25/CELL_IT" postCellId="../SOM_L5/1/CELL_SOM" weight="0.006125" delay="5.595594030289044 ms"/>
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        </projection>
        <projection id="NetConn_PT_L5B_IT_L5A_AMPA" presynapticPopulation="PT_L5B" postsynapticPopulation="IT_L5A" synapse="AMPA">
            <connectionWD id="0" preCellId="../PT_L5B/13/CELL_PT" postCellId="../IT_L5A/0/CELL_IT" weight="0.012" delay="3.878569775972757 ms"/>
            <connectionWD id="1" preCellId="../PT_L5B/30/CELL_PT" postCellId="../IT_L5A/1/CELL_IT" weight="0.012" delay="4.737691144072451 ms"/>
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        </projection>
        <projection id="NetConn_IT_L5B_PT_L5B_AMPA" presynapticPopulation="IT_L5B" postsynapticPopulation="PT_L5B" synapse="AMPA">
            <connectionWD id="0" preCellId="../IT_L5B/19/CELL_IT" postCellId="../PT_L5B/0/CELL_PT" weight="0.0355" delay="2.4775205849439734 ms"/>
            <connectionWD id="1" preCellId="../IT_L5B/12/CELL_IT" postCellId="../PT_L5B/0/CELL_PT" weight="0.0355" delay="3.265041442109357 ms"/>
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        </projection>
        <projection id="NetConn_PV_L5_PV_L5_GABAA" presynapticPopulation="PV_L5" postsynapticPopulation="PV_L5" synapse="GABAA">
            <connectionWD id="0" preCellId="../PV_L5/14/CELL_PV" postCellId="../PV_L5/0/CELL_PV" weight="0.025" delay="4.288789349414894 ms"/>
            <connectionWD id="1" preCellId="../PV_L5/2/CELL_PV" postCellId="../PV_L5/0/CELL_PV" weight="0.025" delay="2.649693330330823 ms"/>
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        </projection>
        <projection id="NetConn_IT_L23_SOM_L23_AMPA" presynapticPopulation="IT_L23" postsynapticPopulation="SOM_L23" synapse="AMPA">
            <connectionWD id="0" preCellId="../IT_L23/3/CELL_IT" postCellId="../SOM_L23/0/CELL_SOM" weight="0.039" delay="2.64608338646986 ms"/>
            <connectionWD id="1" preCellId="../IT_L23/9/CELL_IT" postCellId="../SOM_L23/0/CELL_SOM" weight="0.039" delay="2.3919707319655985 ms"/>
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        </projection>
        <projection id="NetConn_PT_L5B_PV_L23_AMPA" presynapticPopulation="PT_L5B" postsynapticPopulation="PV_L23" synapse="AMPA">
            <connectionWD id="0" preCellId="../PT_L5B/17/CELL_PT" postCellId="../PV_L23/0/CELL_PV" weight="0.018125" delay="7.799764213701746 ms"/>
            <connectionWD id="1" preCellId="../PT_L5B/25/CELL_PT" postCellId="../PV_L23/1/CELL_PV" weight="0.018125" delay="7.4372227457858795 ms"/>
            <connectionWD id="2" preCellId="../PT_L5B/12/CELL_PT" postCellId="../PV_L23/6/CELL_PV" weight="0.018125" delay="9.043332411594111 ms"/>
        </projection>
        <projection id="NetConn_PT_L5B_SOM_L5_AMPA" presynapticPopulation="PT_L5B" postsynapticPopulation="SOM_L5" synapse="AMPA">
            <connectionWD id="0" preCellId="../PT_L5B/14/CELL_PT" postCellId="../SOM_L5/0/CELL_SOM" weight="0.006125" delay="2.578317426643645 ms"/>
            <connectionWD id="1" preCellId="../PT_L5B/32/CELL_PT" postCellId="../SOM_L5/1/CELL_SOM" weight="0.006125" delay="2.7781897632494417 ms"/>
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        </projection>
        <projection id="NetConn_IT_L6_PT_L5B_AMPA" presynapticPopulation="IT_L6" postsynapticPopulation="PT_L5B" synapse="AMPA">
            <connectionWD id="0" preCellId="../IT_L6/20/CELL_IT" postCellId="../PT_L5B/1/CELL_PT" weight="0.02525" delay="4.596904682235066 ms"/>
            <connectionWD id="1" preCellId="../IT_L6/19/CELL_IT" postCellId="../PT_L5B/1/CELL_PT" weight="0.015" delay="7.3388878852810935 ms"/>
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        </projection>
        <projection id="NetConn_IT_L4_PV_L6_AMPA" presynapticPopulation="IT_L4" postsynapticPopulation="PV_L6" synapse="AMPA">
            <connectionWD id="0" preCellId="../IT_L4/3/CELL_IT" postCellId="../PV_L6/2/CELL_PV" weight="0.021875" delay="10.225057730615507 ms"/>
        </projection>
        <projection id="NetConn_IT_L23_PT_L5B_AMPA" presynapticPopulation="IT_L23" postsynapticPopulation="PT_L5B" synapse="AMPA">
            <connectionWD id="0" preCellId="../IT_L23/17/CELL_IT" postCellId="../PT_L5B/0/CELL_PT" weight="0.011" delay="8.84225723195118 ms"/>
            <connectionWD id="1" preCellId="../IT_L23/26/CELL_IT" postCellId="../PT_L5B/0/CELL_PT" weight="0.011" delay="8.859808247413355 ms"/>
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        </projection>
        <projection id="NetConn_IT_L5A_IT_L4_AMPA" presynapticPopulation="IT_L5A" postsynapticPopulation="IT_L4" synapse="AMPA">
            <connectionWD id="0" preCellId="../IT_L5A/12/CELL_IT" postCellId="../IT_L4/0/CELL_IT" weight="0.024" delay="4.183646322243961 ms"/>
            <connectionWD id="1" preCellId="../IT_L5A/28/CELL_IT" postCellId="../IT_L4/0/CELL_IT" weight="0.024" delay="4.128033020843186 ms"/>
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        </projection>
        <projection id="NetConn_IT_L5A_SOM_L6_AMPA" presynapticPopulation="IT_L5A" postsynapticPopulation="SOM_L6" synapse="AMPA">
            <connectionWD id="0" preCellId="../IT_L5A/6/CELL_IT" postCellId="../SOM_L6/0/CELL_SOM" weight="0.021875" delay="8.079725077161406 ms"/>
            <connectionWD id="1" preCellId="../IT_L5A/20/CELL_IT" postCellId="../SOM_L6/3/CELL_SOM" weight="0.021875" delay="6.712041221288022 ms"/>
            <connectionWD id="2" preCellId="../IT_L5A/14/CELL_IT" postCellId="../SOM_L6/6/CELL_SOM" weight="0.021875" delay="7.446945898954732 ms"/>
        </projection>
        <projection id="NetConn_PT_L5B_PT_L5B_AMPA" presynapticPopulation="PT_L5B" postsynapticPopulation="PT_L5B" synapse="AMPA">
            <connectionWD id="0" preCellId="../PT_L5B/19/CELL_PT" postCellId="../PT_L5B/0/CELL_PT" weight="0.0355" delay="2.8691821381678944 ms"/>
            <connectionWD id="1" preCellId="../PT_L5B/20/CELL_PT" postCellId="../PT_L5B/0/CELL_PT" weight="0.02525" delay="3.7760769241377368 ms"/>
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        </projection>
        <projection id="NetConn_CT_L6_PT_L5B_AMPA" presynapticPopulation="CT_L6" postsynapticPopulation="PT_L5B" synapse="AMPA">
            <connectionWD id="0" preCellId="../CT_L6/6/CELL_CT" postCellId="../PT_L5B/3/CELL_PT" weight="0.015" delay="6.747237220673835 ms"/>
            <connectionWD id="1" preCellId="../CT_L6/8/CELL_CT" postCellId="../PT_L5B/4/CELL_PT" weight="0.02525" delay="4.164433036859863 ms"/>
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        </projection>
        <projection id="NetConn_IT_L6_IT_L6_AMPA" presynapticPopulation="IT_L6" postsynapticPopulation="IT_L6" synapse="AMPA">
            <connectionWD id="0" preCellId="../IT_L6/28/CELL_IT" postCellId="../IT_L6/2/CELL_IT" weight="0.0265" delay="2.111083687163275 ms"/>
            <connectionWD id="1" preCellId="../IT_L6/12/CELL_IT" postCellId="../IT_L6/3/CELL_IT" weight="0.0265" delay="2.931817318638246 ms"/>
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        </projection>
        <projection id="NetConn_CT_L6_IT_L5B_AMPA" presynapticPopulation="CT_L6" postsynapticPopulation="IT_L5B" synapse="AMPA">
            <connectionWD id="0" preCellId="../CT_L6/11/CELL_CT" postCellId="../IT_L5B/0/CELL_IT" weight="0.015" delay="6.215741158862679 ms"/>
            <connectionWD id="1" preCellId="../CT_L6/18/CELL_CT" postCellId="../IT_L5B/1/CELL_IT" weight="0.015" delay="6.082961775796701 ms"/>
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        </projection>
        <projection id="NetConn_PV_L23_IT_L23_GABAA" presynapticPopulation="PV_L23" postsynapticPopulation="IT_L23" synapse="GABAA">
            <connectionWD id="0" preCellId="../PV_L23/1/CELL_PV" postCellId="../IT_L23/0/CELL_IT" weight="0.025" delay="2.5316405283453665 ms"/>
            <connectionWD id="1" preCellId="../PV_L23/3/CELL_PV" postCellId="../IT_L23/0/CELL_IT" weight="0.025" delay="2.213598791949837 ms"/>
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        </projection>
        <projection id="NetConn_PV_L6_CT_L6_GABAA" presynapticPopulation="PV_L6" postsynapticPopulation="CT_L6" synapse="GABAA">
            <connectionWD id="0" preCellId="../PV_L6/2/CELL_PV" postCellId="../CT_L6/0/CELL_CT" weight="0.025" delay="2.261784302288145 ms"/>
            <connectionWD id="1" preCellId="../PV_L6/3/CELL_PV" postCellId="../CT_L6/0/CELL_CT" weight="0.025" delay="2.4091027908965024 ms"/>
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        </projection>
        <projection id="NetConn_PT_L5B_SOM_L6_AMPA" presynapticPopulation="PT_L5B" postsynapticPopulation="SOM_L6" synapse="AMPA">
            <connectionWD id="0" preCellId="../PT_L5B/22/CELL_PT" postCellId="../SOM_L6/0/CELL_SOM" weight="0.021875" delay="4.293882672089058 ms"/>
            <connectionWD id="1" preCellId="../PT_L5B/29/CELL_PT" postCellId="../SOM_L6/1/CELL_SOM" weight="0.021875" delay="6.552394524021045 ms"/>
            <connectionWD id="2" preCellId="../PT_L5B/28/CELL_PT" postCellId="../SOM_L6/5/CELL_SOM" weight="0.021875" delay="3.14506223194664 ms"/>
        </projection>
        <projection id="NetConn_PV_L5_IT_L5B_GABAA" presynapticPopulation="PV_L5" postsynapticPopulation="IT_L5B" synapse="GABAA">
            <connectionWD id="0" preCellId="../PV_L5/9/CELL_PV" postCellId="../IT_L5B/0/CELL_IT" weight="0.025" delay="4.2191050649205675 ms"/>
            <connectionWD id="1" preCellId="../PV_L5/11/CELL_PV" postCellId="../IT_L5B/0/CELL_IT" weight="0.025" delay="2.4090569070528427 ms"/>
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        </projection>
        <projection id="NetConn_IT_L5A_CT_L6_AMPA" presynapticPopulation="IT_L5A" postsynapticPopulation="CT_L6" synapse="AMPA">
            <connectionWD id="0" preCellId="../IT_L5A/22/CELL_IT" postCellId="../CT_L6/26/CELL_CT" weight="0.0245" delay="7.197938362782967 ms"/>
            <connectionWD id="1" preCellId="../IT_L5A/19/CELL_IT" postCellId="../CT_L6/27/CELL_CT" weight="0.014" delay="7.579707856986605 ms"/>
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        </projection>
        <projection id="NetConn_IT_L6_PV_L6_AMPA" presynapticPopulation="IT_L6" postsynapticPopulation="PV_L6" synapse="AMPA">
            <connectionWD id="0" preCellId="../IT_L6/8/CELL_IT" postCellId="../PV_L6/2/CELL_PV" weight="0.0265" delay="2.265929882485531 ms"/>
            <connectionWD id="1" preCellId="../IT_L6/20/CELL_IT" postCellId="../PV_L6/2/CELL_PV" weight="0.0265" delay="4.711868434096331 ms"/>
            <connectionWD id="2" preCellId="../IT_L6/26/CELL_IT" postCellId="../PV_L6/5/CELL_PV" weight="0.0265" delay="3.930711557226733 ms"/>
        </projection>
        <projection id="NetConn_IT_L5B_SOM_L23_AMPA" presynapticPopulation="IT_L5B" postsynapticPopulation="SOM_L23" synapse="AMPA">
            <connectionWD id="0" preCellId="../IT_L5B/0/CELL_IT" postCellId="../SOM_L23/1/CELL_SOM" weight="0.018125" delay="7.474523590973416 ms"/>
            <connectionWD id="1" preCellId="../IT_L5B/21/CELL_IT" postCellId="../SOM_L23/1/CELL_SOM" weight="0.018125" delay="10.376884596968383 ms"/>
            <connectionWD id="2" preCellId="../IT_L5B/29/CELL_IT" postCellId="../SOM_L23/3/CELL_SOM" weight="0.018125" delay="10.162388872705337 ms"/>
        </projection>
        <projection id="NetConn_CT_L6_IT_L4_AMPA" presynapticPopulation="CT_L6" postsynapticPopulation="IT_L4" synapse="AMPA">
            <connectionWD id="0" preCellId="../CT_L6/30/CELL_CT" postCellId="../IT_L4/1/CELL_IT" weight="0.002" delay="7.836600189932853 ms"/>
            <connectionWD id="1" preCellId="../CT_L6/4/CELL_CT" postCellId="../IT_L4/1/CELL_IT" weight="0.002" delay="8.981108982117973 ms"/>
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        </projection>
        <projection id="NetConn_IT_L5A_PV_L23_AMPA" presynapticPopulation="IT_L5A" postsynapticPopulation="PV_L23" synapse="AMPA">
            <connectionWD id="0" preCellId="../IT_L5A/26/CELL_IT" postCellId="../PV_L23/0/CELL_PV" weight="0.018125" delay="6.289810058219502 ms"/>
            <connectionWD id="1" preCellId="../IT_L5A/18/CELL_IT" postCellId="../PV_L23/3/CELL_PV" weight="0.018125" delay="4.735930908167973 ms"/>
            <connectionWD id="2" preCellId="../IT_L5A/5/CELL_IT" postCellId="../PV_L23/4/CELL_PV" weight="0.018125" delay="6.139320338846172 ms"/>
        </projection>
        <projection id="NetConn_SOM_L6_CT_L6_GABAB" presynapticPopulation="SOM_L6" postsynapticPopulation="CT_L6" synapse="GABAB">
            <connectionWD id="0" preCellId="../SOM_L6/4/CELL_SOM" postCellId="../CT_L6/0/CELL_CT" weight="0.025" delay="3.251585289501843 ms"/>
            <connectionWD id="1" preCellId="../SOM_L6/0/CELL_SOM" postCellId="../CT_L6/0/CELL_CT" weight="0.025" delay="2.5664245504627896 ms"/>
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        </projection>
        <projection id="NetConn_IT_L5B_SOM_L6_AMPA" presynapticPopulation="IT_L5B" postsynapticPopulation="SOM_L6" synapse="AMPA">
            <connectionWD id="0" preCellId="../IT_L5B/22/CELL_IT" postCellId="../SOM_L6/0/CELL_SOM" weight="0.021875" delay="7.265053868284494 ms"/>
            <connectionWD id="1" preCellId="../IT_L5B/0/CELL_IT" postCellId="../SOM_L6/1/CELL_SOM" weight="0.021875" delay="7.123472837622453 ms"/>
            <connectionWD id="2" preCellId="../IT_L5B/11/CELL_IT" postCellId="../SOM_L6/2/CELL_SOM" weight="0.021875" delay="7.548267317841118 ms"/>
        </projection>
        <projection id="NetConn_IT_L5A_SOM_L5_AMPA" presynapticPopulation="IT_L5A" postsynapticPopulation="SOM_L5" synapse="AMPA">
            <connectionWD id="0" preCellId="../IT_L5A/0/CELL_IT" postCellId="../SOM_L5/0/CELL_SOM" weight="0.006125" delay="5.748857081758836 ms"/>
            <connectionWD id="1" preCellId="../IT_L5A/27/CELL_IT" postCellId="../SOM_L5/0/CELL_SOM" weight="0.006125" delay="5.801535819597293 ms"/>
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        </projection>
        <projection id="NetConn_SOM_L5_SOM_L5_GABAB" presynapticPopulation="SOM_L5" postsynapticPopulation="SOM_L5" synapse="GABAB">
            <connectionWD id="0" preCellId="../SOM_L5/8/CELL_SOM" postCellId="../SOM_L5/0/CELL_SOM" weight="0.025" delay="4.099873036080591 ms"/>
            <connectionWD id="1" preCellId="../SOM_L5/11/CELL_SOM" postCellId="../SOM_L5/0/CELL_SOM" weight="0.025" delay="2.327923996973097 ms"/>
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        </projection>
        <projection id="NetConn_IT_L23_SOM_L5_AMPA" presynapticPopulation="IT_L23" postsynapticPopulation="SOM_L5" synapse="AMPA">
            <connectionWD id="0" preCellId="../IT_L23/2/CELL_IT" postCellId="../SOM_L5/0/CELL_SOM" weight="0.0505" delay="8.596808367000168 ms"/>
            <connectionWD id="1" preCellId="../IT_L23/20/CELL_IT" postCellId="../SOM_L5/0/CELL_SOM" weight="0.0505" delay="8.46001690290802 ms"/>
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        </projection>
        <projection id="NetConn_IT_L5B_PV_L6_AMPA" presynapticPopulation="IT_L5B" postsynapticPopulation="PV_L6" synapse="AMPA">
            <connectionWD id="0" preCellId="../IT_L5B/0/CELL_IT" postCellId="../PV_L6/2/CELL_PV" weight="0.021875" delay="7.881476138556164 ms"/>
            <connectionWD id="1" preCellId="../IT_L5B/18/CELL_IT" postCellId="../PV_L6/5/CELL_PV" weight="0.021875" delay="6.6120452326065315 ms"/>
            <connectionWD id="2" preCellId="../IT_L5B/32/CELL_IT" postCellId="../PV_L6/5/CELL_PV" weight="0.021875" delay="6.9769850544191705 ms"/>
            <connectionWD id="3" preCellId="../IT_L5B/7/CELL_IT" postCellId="../PV_L6/6/CELL_PV" weight="0.021875" delay="7.031805841094671 ms"/>
        </projection>
        <projection id="NetConn_PV_L5_IT_L4_GABAA" presynapticPopulation="PV_L5" postsynapticPopulation="IT_L4" synapse="GABAA">
            <connectionWD id="0" preCellId="../PV_L5/1/CELL_PV" postCellId="../IT_L4/0/CELL_IT" weight="0.025" delay="3.8385030964141924 ms"/>
            <connectionWD id="1" preCellId="../PV_L5/13/CELL_PV" postCellId="../IT_L4/1/CELL_IT" weight="0.025" delay="2.5728500157664977 ms"/>
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        </projection>
        <projection id="NetConn_NetStim_background_E_IT_L6_20_1_NMDA__IT_L6" presynapticPopulation="Pop_NetStim_background_E_IT_L6_20_1_NMDA" postsynapticPopulation="IT_L6" synapse="NMDA">
            <connectionWD id="0" preCellId="../Pop_NetStim_background_E_IT_L6_20_1_NMDA[0]" postCellId="../IT_L6/0/CELL_IT" weight="0.1" delay="7.729945349 ms"/>
            <connectionWD id="1" preCellId="../Pop_NetStim_background_E_IT_L6_20_1_NMDA[1]" postCellId="../IT_L6/1/CELL_IT" weight="0.1" delay="6.33875611736 ms"/>
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        </projection>
        <projection id="NetConn_NetStim_background_E_IT_L5B_20_1_NMDA__IT_L5B" presynapticPopulation="Pop_NetStim_background_E_IT_L5B_20_1_NMDA" postsynapticPopulation="IT_L5B" synapse="NMDA">
            <connectionWD id="0" preCellId="../Pop_NetStim_background_E_IT_L5B_20_1_NMDA[0]" postCellId="../IT_L5B/0/CELL_IT" weight="0.1" delay="4.48017663952 ms"/>
            <connectionWD id="1" preCellId="../Pop_NetStim_background_E_IT_L5B_20_1_NMDA[1]" postCellId="../IT_L5B/1/CELL_IT" weight="0.1" delay="6.17249887593 ms"/>
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        </projection>
        <projection id="NetConn_NetStim_background_E_PV_L5_20_1_NMDA__PV_L5" presynapticPopulation="Pop_NetStim_background_E_PV_L5_20_1_NMDA" postsynapticPopulation="PV_L5" synapse="NMDA">
            <connectionWD id="0" preCellId="../Pop_NetStim_background_E_PV_L5_20_1_NMDA[0]" postCellId="../PV_L5/0/CELL_PV" weight="0.05" delay="5.39415585057 ms"/>
            <connectionWD id="1" preCellId="../Pop_NetStim_background_E_PV_L5_20_1_NMDA[1]" postCellId="../PV_L5/1/CELL_PV" weight="0.05" delay="6.05523568065 ms"/>
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        </projection>
        <projection id="NetConn_NetStim_background_E_SOM_L6_20_1_NMDA__SOM_L6" presynapticPopulation="Pop_NetStim_background_E_SOM_L6_20_1_NMDA" postsynapticPopulation="SOM_L6" synapse="NMDA">
            <connectionWD id="0" preCellId="../Pop_NetStim_background_E_SOM_L6_20_1_NMDA[0]" postCellId="../SOM_L6/0/CELL_SOM" weight="0.03" delay="5.15010535863 ms"/>
            <connectionWD id="1" preCellId="../Pop_NetStim_background_E_SOM_L6_20_1_NMDA[1]" postCellId="../SOM_L6/1/CELL_SOM" weight="0.03" delay="6.53624380049 ms"/>
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        </projection>
        <projection id="NetConn_NetStim_background_E_SOM_L5_20_1_NMDA__SOM_L5" presynapticPopulation="Pop_NetStim_background_E_SOM_L5_20_1_NMDA" postsynapticPopulation="SOM_L5" synapse="NMDA">
            <connectionWD id="0" preCellId="../Pop_NetStim_background_E_SOM_L5_20_1_NMDA[0]" postCellId="../SOM_L5/0/CELL_SOM" weight="0.03" delay="4.44306185914 ms"/>
            <connectionWD id="1" preCellId="../Pop_NetStim_background_E_SOM_L5_20_1_NMDA[1]" postCellId="../SOM_L5/1/CELL_SOM" weight="0.03" delay="5.18752094729 ms"/>
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        </projection>
        <projection id="NetConn_NetStim_background_E_PT_L5B_20_1_NMDA__PT_L5B" presynapticPopulation="Pop_NetStim_background_E_PT_L5B_20_1_NMDA" postsynapticPopulation="PT_L5B" synapse="NMDA">
            <connectionWD id="0" preCellId="../Pop_NetStim_background_E_PT_L5B_20_1_NMDA[0]" postCellId="../PT_L5B/0/CELL_PT" weight="0.1" delay="4.17609232269 ms"/>
            <connectionWD id="1" preCellId="../Pop_NetStim_background_E_PT_L5B_20_1_NMDA[1]" postCellId="../PT_L5B/1/CELL_PT" weight="0.1" delay="6.9082150924 ms"/>
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        </projection>
        <projection id="NetConn_NetStim_background_E_IT_L4_20_1_NMDA__IT_L4" presynapticPopulation="Pop_NetStim_background_E_IT_L4_20_1_NMDA" postsynapticPopulation="IT_L4" synapse="NMDA">
            <connectionWD id="0" preCellId="../Pop_NetStim_background_E_IT_L4_20_1_NMDA[0]" postCellId="../IT_L4/0/CELL_IT" weight="0.1" delay="6.33511140274 ms"/>
            <connectionWD id="1" preCellId="../Pop_NetStim_background_E_IT_L4_20_1_NMDA[1]" postCellId="../IT_L4/1/CELL_IT" weight="0.1" delay="3.13730000221 ms"/>
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        </projection>
        <projection id="NetConn_NetStim_background_E_PV_L23_20_1_NMDA__PV_L23" presynapticPopulation="Pop_NetStim_background_E_PV_L23_20_1_NMDA" postsynapticPopulation="PV_L23" synapse="NMDA">
            <connectionWD id="0" preCellId="../Pop_NetStim_background_E_PV_L23_20_1_NMDA[0]" postCellId="../PV_L23/0/CELL_PV" weight="0.05" delay="3.2236392455 ms"/>
            <connectionWD id="1" preCellId="../Pop_NetStim_background_E_PV_L23_20_1_NMDA[1]" postCellId="../PV_L23/1/CELL_PV" weight="0.05" delay="5.62010348563 ms"/>
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        </projection>
        <projection id="NetConn_NetStim_background_E_CT_L6_20_1_NMDA__CT_L6" presynapticPopulation="Pop_NetStim_background_E_CT_L6_20_1_NMDA" postsynapticPopulation="CT_L6" synapse="NMDA">
            <connectionWD id="0" preCellId="../Pop_NetStim_background_E_CT_L6_20_1_NMDA[0]" postCellId="../CT_L6/0/CELL_CT" weight="0.1" delay="5.66470882443 ms"/>
            <connectionWD id="1" preCellId="../Pop_NetStim_background_E_CT_L6_20_1_NMDA[1]" postCellId="../CT_L6/1/CELL_CT" weight="0.1" delay="3.64195184367 ms"/>
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        </projection>
        <projection id="NetConn_NetStim_background_E_IT_L23_20_1_NMDA__IT_L23" presynapticPopulation="Pop_NetStim_background_E_IT_L23_20_1_NMDA" postsynapticPopulation="IT_L23" synapse="NMDA">
            <connectionWD id="0" preCellId="../Pop_NetStim_background_E_IT_L23_20_1_NMDA[0]" postCellId="../IT_L23/0/CELL_IT" weight="0.1" delay="4.80395855059 ms"/>
            <connectionWD id="1" preCellId="../Pop_NetStim_background_E_IT_L23_20_1_NMDA[1]" postCellId="../IT_L23/1/CELL_IT" weight="0.1" delay="7.57280974483 ms"/>
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        </projection>
        <projection id="NetConn_NetStim_background_E_PV_L6_20_1_NMDA__PV_L6" presynapticPopulation="Pop_NetStim_background_E_PV_L6_20_1_NMDA" postsynapticPopulation="PV_L6" synapse="NMDA">
            <connectionWD id="0" preCellId="../Pop_NetStim_background_E_PV_L6_20_1_NMDA[0]" postCellId="../PV_L6/0/CELL_PV" weight="0.05" delay="3.79358205857 ms"/>
            <connectionWD id="1" preCellId="../Pop_NetStim_background_E_PV_L6_20_1_NMDA[1]" postCellId="../PV_L6/1/CELL_PV" weight="0.05" delay="4.96319281148 ms"/>
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        </projection>
        <projection id="NetConn_NetStim_background_E_IT_L5A_20_1_NMDA__IT_L5A" presynapticPopulation="Pop_NetStim_background_E_IT_L5A_20_1_NMDA" postsynapticPopulation="IT_L5A" synapse="NMDA">
            <connectionWD id="0" preCellId="../Pop_NetStim_background_E_IT_L5A_20_1_NMDA[0]" postCellId="../IT_L5A/0/CELL_IT" weight="0.1" delay="4.72129330885 ms"/>
            <connectionWD id="1" preCellId="../Pop_NetStim_background_E_IT_L5A_20_1_NMDA[1]" postCellId="../IT_L5A/1/CELL_IT" weight="0.1" delay="3.53182434607 ms"/>
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        </projection>
        <projection id="NetConn_NetStim_background_E_SOM_L23_20_1_NMDA__SOM_L23" presynapticPopulation="Pop_NetStim_background_E_SOM_L23_20_1_NMDA" postsynapticPopulation="SOM_L23" synapse="NMDA">
            <connectionWD id="0" preCellId="../Pop_NetStim_background_E_SOM_L23_20_1_NMDA[0]" postCellId="../SOM_L23/0/CELL_SOM" weight="0.03" delay="4.95903818073 ms"/>
            <connectionWD id="1" preCellId="../Pop_NetStim_background_E_SOM_L23_20_1_NMDA[1]" postCellId="../SOM_L23/1/CELL_SOM" weight="0.03" delay="5.90330689931 ms"/>
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        </projection>
    </network>
</neuroml>
